σ_x := -5.6 ksi
σ_y := 11.2 ksi
τ_xy := -6.70 ksi
θ := -25 deg
σ_x' := (σ_x + σ_y)/2 + (σ_x - σ_y)/2*cos(2*θ) + τ_xy*sin(2*θ) = 2.53308 ksi
σ_y' := (σ_x + σ_y)/2 - (σ_x - σ_y)/2*cos(2*θ) - τ_xy*sin(2*θ) = 3.06692 ksi
τ_x'y' := -(σ_x - σ_y)/2*sin(2*θ) + τ_xy*cos(2*θ) = -10.7415 ksi
θ := 65 deg
σ_x' := (σ_x + σ_y)/2 + (σ_x - σ_y)/2*cos(2*θ) + τ_xy*sin(2*θ) = 3.06692 ksi
σ_y' := (σ_x + σ_y)/2 - (σ_x - σ_y)/2*cos(2*θ) - τ_xy*sin(2*θ) = 2.53308 ksi
τ_x'y' := -(σ_x - σ_y)/2*sin(2*θ) + τ_xy*cos(2*θ) = 10.7415 ksi
